# Power consumtion - ImageCompressionApp
R_shunt := 10 Ω
V_batt := 2.734 V
V_sum.raw := 564.87 mV*s
E_send.raw := V_sum.raw/R_shunt*V_batt
E_send.raw = 154.435 J*10^-3
V_sum.comp := 595.24 mV*s
E_send.comp := V_sum.comp/R_shunt*V_batt
E_send.comp = 162.739 J*10^-3
t_raw := 26.8 s
t_comp := 28.8 s
